# BP308 Resolution
# XAxis Lead Screw
XLS := 8*mm  # Lead Screw Pitch
XGear := 2  # Motor to Lead Screw Gear Ratio
XEnc := 4000  # Motor Encoder Resolution
XRes := XLS/(XGear*XEnc)
XRes = 1e-6 m
XRes = 3.93701e-5 in
# Steps per inch
1/XRes = 25400 1/in
# Steps per mm
1/XRes = 1000 1/mm
Velocity := 160000*1/sec
Xvel := Velocity*XRes
Xvel = 377.953 in/min
Xvel = 9600 mm/min
# At top speed what is the motor RPM?
XMotRPM := Xvel*XGear/XLS = 40 1/s
XMotRPM = 2400 1/min
# Voltage Scaling for Motor Drive
MotorGain := 9/3000*V*min  # 9 Volts = 3000 RPM
DACRes := 2^12
DACRes = 4096
DAC_V := 11*V/(DACRes/2)
DAC_V = 0.00537109 V  # Volts per bit
XMotRPM*MotorGain = 7.2 V
XMotRPM*MotorGain/DAC_V = 1340.51  # This is the max that the DAC output should probably ever be...
1400*DAC_V = 7.51953 V
XAccel := 7*10^6/s^2
XAccel*XRes = 7000 mm/s^2
Xvel = 6.29921 in/s
XAccel*XRes = 275.591 in/s^2
# Y Axis - same as X Axis
YRes := XRes
# Z Axis
# ZAxis Lead Screw
ZLS := 5*mm  # Lead Screw Pitch
ZGear := 2  # Motor to Lead Screw Gear Ratio
ZEnc := 5000  # Motor Encoder Resolution
ZRes := ZLS/(ZGear*ZEnc)
ZRes = 5e-7 m
ZRes = 1.9685e-5 in
# Steps per inch
1/ZRes = 50800 1/in
# Steps per mm
1/ZRes = 2000 1/mm
Velocity2 := 160000*1/sec
Zvel := Velocity2*ZRes
Zvel = 188.976 in/min
Zvel = 4800 mm/min
# Distance from home to limit switch
# X Axis
XH2L := -567665
YH2L := -354209
ZH2L := -761414
Xext := XH2L*XRes
Xext = -0.567665 m
Xext = -22.349 in
Yext := YH2L*YRes
Yext = -0.354209 m
Yext = -13.9452 in
Zext := ZH2L*ZRes
Zext = -0.380707 m
Zext = -14.9885 in
# Spindle Resolution
SPEnc := 2000  # 2000 counts per revolution
SPmax := 6000/min  # Maximum Spindle RPM 6000
# max encoder rate
EncMax := SPEnc*SPmax
EncMax = 200000 1/s
# RPM Calcualtion Period
RPMper := 0.2*s
RPM := 1000/min
TperP := RPM*SPEnc*RPMper
TperP = 6666.67
m1 := -80000
m2 := m1 - TperP
Dif := m1 - m2
Dif = 6666.67
xRPM := Dif/(SPEnc*RPMper)
xRPM = 1000 1/min
