# BP308 Resolution
# XAxis Lead Screw
XLS := 8*mm  # Lead Screw Pitch
XGear := 2  # Motor to Lead Screw Gear Ratio
XEnc := 4000  # Motor Encoder Resolution
XRes := XLS/(XGear*XEnc)
XRes = 1e-6 m
XRes = 3.93701e-5 in
1/XRes = 25400 1/in
Velocity := 200000*1/sec
Xvel := Velocity*XRes
Xvel = 472.441 in/min
Xvel = 12000 mm/min
# At top speed what is the motor RPM?
XMotRPM := Xvel*XGear/XLS = 50 1/s
XMotRPM = 3000 1/min
# Voltage Scaling for Motor Drive
MotorGain := 9/3000*V*min  # 9 Volts = 3000 RPM
DACRes := 2^12
DACRes = 4096
DAC_V := 11*V/(DACRes/2)
DAC_V = 0.00537109 V  # Volts per bit
XMotRPM*MotorGain = 9 V
XMotRPM*MotorGain/DAC_V = 1675.64  # This is the max that the DAC output should probably ever be...
1675*DAC_V = 8.99658 V
XAccel := 7*10^6/s^2
XAccel*XRes = 7000 mm/s^2
Xvel = 7.87402 in/s
XAccel*XRes = 275.591 in/s^2
# Y Axis - same as X Axis
# Z Axis
# ZAxis Lead Screw
ZLS := 5*mm  # Lead Screw Pitch
ZGear := 2  # Motor to Lead Screw Gear Ratio
ZEnc := 5000  # Motor Encoder Resolution
ZRes := ZLS/(ZGear*ZEnc)
ZRes = 5e-7 m
ZRes = 1.9685e-5 in
1/ZRes = 50800 1/in
Velocity2 := 200000*1/sec
Zvel := Velocity2*ZRes
Zvel = 236.22 in/min
Zvel = 6000 mm/min
# At top speed what is the motor RPM?
ZMotRPM := Zvel*ZGear/ZLS = 40 1/s
ZMotRPM = 2400 1/min
# Voltage Scaling for Motor Drive
MotorGain := 9/3000*V*min  # 9 Volts = 3000 RPM
DACRes := 2^12
DACRes = 4096
DAC_V := 11*V/(DACRes/2)
DAC_V = 0.00537109 V  # Volts per bit
ZMotRPM*MotorGain = 7.2 V
ZMotRPM*MotorGain/DAC_V = 1340.51  # This is the max that the DAC output should probably ever be...
1340*DAC_V = 7.19727 V
